**
** ABAQUS Input Deck Generated by HyperMesh Version  : 13.0.0.119
** Generated using HyperMesh-Abaqus Template Version : 13.0
**
**   Template:  ABAQUS/STANDARD 3D
**
*NODE
     86417,  140.0          ,  85.0           ,  -34.0
     86418,  140.0          ,  87.5           ,  -34.0
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**HWCOLOR COMP         36    17
*ELEMENT,TYPE=S3,ELSET=liner-walls-d
    212645,    195014,    194680,    195013
    212644,    195014,    194679,    194680
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**HMASSEM       2       5 walls
**HMASSEM_COMP_ID             35      36
**HMASSEM       6      11 columns
**HM_comp_by_property "wall1000"    17
*SHELL SECTION, ELSET=liner-walls-d, MATERIAL=wall
1.0       ,
**HM_comp_by_property "wall800"    29
*SHELL SECTION, ELSET=liner-walls-c1c2, MATERIAL=wall
0.8       ,
*MATERIAL, NAME=wall
*****
