**
** ABAQUS Input Deck Generated by HyperMesh Version  : 13.0.0.119
** Generated using HyperMesh-Abaqus Template Version : 13.0
**
**   Template:  ABAQUS/STANDARD 3D
**
*NODE
         2,  140.0          ,  0.0            ,  -9.35
         3,  160.0          ,  0.0            ,  -9.35
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**HWCOLOR COMP         26    33
*ELEMENT,TYPE=B31,ELSET=pile-columns-c1
     61090,     12038,     52067
     61091,     12589,     52402
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**HWCOLOR COMP         27    29
*ELEMENT,TYPE=B31,ELSET=pile-columns-c2
     61510,     32897,     17614
     61511,     32911,     18201
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**HWCOLOR COMP         28    57
*ELEMENT,TYPE=B31,ELSET=pile-columns-d
     62310,     28743,      8443
     62311,     28797,      7686
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**HWCOLOR COMP          1    25
*ELEMENT,TYPE=B31,ELSET=beam-struts-c1-1
         1,     33842,     33659
         2,     34025,     33842
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**HWCOLOR COMP          2    37
*ELEMENT,TYPE=B31,ELSET=beam-struts-c1-2
       180,     12763,     11893
       181,     13236,     12763
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**HWCOLOR COMP          3    53
*ELEMENT,TYPE=B31,ELSET=beam-struts-c1-3
       359,     51947,     52334
       360,     51605,     52440
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**HWCOLOR COMP         39     3
*ELEMENT,TYPE=S3,ELSET=shell-slab
    182352,     28597,     28146,     28147
    182353,     28597,     28147,     28596
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**HWCOLOR COMP         35     3
*ELEMENT,TYPE=S4R,ELSET=liner-LG_C2Wall-Left
    175552,     17579,     24694,     24662,     17578
    175736,     32687,     36011,     36013,     33674
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**HWCOLOR COMP         36    17
*ELEMENT,TYPE=S4R,ELSET=liner-LG_DWall
    179216,    106381,     99246,     99247,    106382
    179217,    106348,     99213,     98869,    106005
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**HMASSEM       2       5 walls-slabs
**HMASSEM_COMP_ID             35      36      39      40      41      42
**HMASSEM       3       5 soil-excavated
**HMASSEM_COMP_ID             16      17      18      19      20      12      13
**HMASSEM_COMP_ID             14      15      21      22      23      24      25
**HMASSEM       4       5 struts
**HMASSEM_COMP_ID              4       5       6       7       1       2       3
**HMASSEM_COMP_ID              8       9      10      11
**HMASSEM       5      11 soil
**HMASSEM_COMP_ID             30      33      34      29      31      32
**HMASSEM       6      11 columns
**HMASSEM_COMP_ID             26      27      28
*ELSET, ELSET=wall1000
    175552,    175840,    175850,    175875,    175991,    176085
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*ELSET, ELSET=HMprop_strut
         1,         2,         3,         4,         5,         6
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*ELSET, ELSET=HMprop_column
     61510,     61511,     61512,     61513,     61514,     61515
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**HM_comp_by_property "wall1000"    17
*SHELL SECTION, ELSET=liner-LG_DWall, MATERIAL=wall
1.0       ,
**HM_comp_by_property "wall1000"    17
*SHELL SECTION, ELSET=shell-slab, MATERIAL=wall
1.0       ,
**HM_comp_by_property "wall800"    29
*SHELL SECTION, ELSET=liner-LG_C2Wall-Left, MATERIAL=wall
0.8       ,
**HM_comp_by_property "column"     7
**HMBEAMSEC ASSOC                     13               1
*BEAM SECTION, ELSET=pile-columns-c1, MATERIAL= column, SECTION=CIRC
1.0       ,
**HMNAME BEAMSECTCOL          1 StrutColumn
**HMNAME BEAMSECTS
**HMCONT               1               1column
**HMCONT       2       7       1       01.0     1.0     0.0     0.0     0.0
**HMCONT0.0            2
**HMNAME BEAMSECTS  BEAMSECTIONSTANDARD       11       1       0CIRC
**HMNAME BEAMSECTS  BEAMSECTIONSTANDARD  PARAMETERS     1.0     10.0    10.0
**HMNAME BEAMSECTS  END
**HMNAME BEAMSECTS
**HMCONT               2               1strut
**HMCONT       2       7       1       01.0     1.0     0.0     0.0     0.0
**HMCONT0.0            2
**HMNAME BEAMSECTS  BEAMSECTIONSTANDARD       10       2       0RECT
**HMNAME BEAMSECTS  BEAMSECTIONSTANDARD  PARAMETERS     1.3     10.0    10.0
**HMNAME BEAMSECTS  BEAMSECTIONSTANDARD  PARAMETERS     1.0     10.0    10.0
**HMNAME BEAMSECTS  END
**HM_set_by_property    17
*SHELL SECTION, ELSET=wall1000, MATERIAL=wall
1.0       ,
**HM_set_by_property     8
**HMBEAMSEC ASSOC             12       2
*BEAM SECTION, ELSET=HMprop_strut, MATERIAL= strut, SECTION=RECT
1.3       ,1.0
**HM_set_by_property     7
**HMBEAMSEC ASSOC             13       1
*BEAM SECTION, ELSET=HMprop_column, MATERIAL= column, SECTION=CIRC
1.0       ,
*NSET, NSET=LM_WallBottom
     85824,     85849,     85860,     85861,     85865,     85866
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*MATERIAL, NAME=column
*MATERIAL, NAME=strut
*MATERIAL, NAME=wall
*****
